# Міністерство освіти і науки України
# Національний технічний університет України
# "Київський політехнічний інститут ім. Ігоря Сікорського"
# Розрахункова графічна робота
# "Виконання кусочно-лінійної апроксимації"
# Варіант №99
Виконав
# студент групи ІО-91
# Діденко Владислав
# Київ - 2021
# 1. Побудувати графік функції y=f(x) для діапазону зміни аргументу x_min<=x<=x_max. Значення y=f(x), x_min та x_max узяти з таблиці варіантів.
x_max := 1
f(x) :=
    -|2 - x^3| - ln(3) if x ≤ 0
    -ln(x + 3) - 2 if x ≥ 0
x_min := -1
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# 2. Визначити другу похідну функції | d^2*y/dx^2 | та побудувати її графік для діапазону зміни аргументу
# x_min<=x<=x_max.
d2f(x) :=
    d^2/dx^2(f(x)) if x ≤ 0
    d^2/dx^2(f(x)) if x ≥ 0
d^2/dx^2(-|2 - x^3| - ln(3)) → 6*x*signum(2 - x^3, 0) - 18*x^4*Δ(2 - x^3)
d^2/dx^2(-ln(x + 3) - 2) → 1/(x + 3)^2
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d2f(-0.0001) = 0
# 3. Побудувати графік модулю другої похідної функції | |d^2*y/dx^2| | для діапазону зміни аргументу
# x_min<=x<=x_max.
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xa := 1
x0 := 1
# 4. Проаналізувати графік нелініної залежності функції y=f(x), з'ясувавши характер опуклості та вгнутості функції по частинам, наявність точок перегинання та наявність точок розриву першого роду другої похідної функції.
Given
# 4.1 Точки перегину
d2f(xa) == 0
x0 := Find(xa)
x0 = 4.22182e16  # - точка перегину.
# 4.2 Опуклість та вгнутість
# Функція f(x) опукла на інтервалі (x_min ; 0)
# Функція f(x) вгнута на інтервалі (0 ; x_max)
# 4.3 Точки розриву першого роду другої похідної функції
# Функція має одну точку розриву першого роду: x = 0
limit(d^2/dx^2(-|2 - x^3| - ln(3)), x → 0-) → 0
limit(d^2/dx^2(-ln(x + 3) - 2), x → 0+) → 1/9
# 5. Обрати початкову точку(або початкові точки) апроксимації для подальших розрахунків, зазначивши її (або їх) на графіках y == f(x) та |d^2*y/dx^2| , визначивши абсцису цієї початкової точки
# x_0^1 | (або абсциси початкових точок x_0^1,x_0^2 тощо).
x_01 := -2
y_01 := f(x_01) = -11.0986
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# 6. По графіку |d^2*y/dx^2| обрати напрямок (або напрямки) розрахунків значень h[i] == x[i] - x[i - 1] (i=1,n) від початкової точки(або від початкових точок) та зазначити його(або їх) на цьому графіку у вигляді стрілок над графіком |d^2*y/dx^2|.
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# 7. Визначити методику розрахунку значень h_i (i=1,n) та обрати формулу для розрахунку значень: h[i] == sqrt(8*Δf_max/A[i]) або h[i] == sqrt(16*Δf_max/A[i]), де A[i] - максимальне по модулю значення другої похідної на і-й частині ломаної лінії, що розраховується.
# Для розрахунку h_i (i=1,n) обираємо формулу sqrt(16*Δf_max/A[1]), тому що функція не має точки перегину. . Ми обрали початкову точку X[1] = x_min, тому що у обраному напрямку функція спадає і ми знатимемо максимальне значення другої похідної на і-ій частині ломаної лінії, що розраховується для подальших розрахунків. Знаючи крок h[i], ми зможемо порахувати A[i + 1].
# 8. Підібрати таке значення похибки Δf_max, при якому в результаті розрахунків h_i (i=1,n) отримаємо n=8 або n=9, тобто отримаємо апроксимуючу ломану лінію з 8 або з 9 частин. Виконати розрахунок усіх значень h_i (i=1,n) та здійснити нумерацію вузлів (вершин ломаної лінії), починаючи з номера 0.
Δf_max := 0.004716
X[0] := x_min = -1
A[1] := |d2f(X[0])| = 6
h[1] := sqrt(16*Δf_max/A[1]) = 0.112143
X[1] := X[0] + h[1] = -0.887857
A[2] := |d2f(X[1])| = 5.32714
h[2] := sqrt(16*Δf_max/A[2]) = 0.119014
X[2] := X[1] + h[2] = -0.768843
A[3] := |d2f(X[2])| = 4.61306
h[3] := sqrt(16*Δf_max/A[3]) = 0.127895
X[3] := X[2] + h[3] = -0.640948
A[4] := |d2f(X[3])| = 3.84569
h[4] := sqrt(16*Δf_max/A[4]) = 0.140075
X[4] := X[3] + h[4] = -0.500873
A[5] := |d2f(X[4])| = 3.00524
h[5] := sqrt(16*Δf_max/A[5]) = 0.158455
X[5] := X[4] + h[5] = -0.342418
A[6] := |d2f(X[5])| = 2.05451
h[6] := sqrt(16*Δf_max/A[6]) = 0.191643
X[6] := X[5] + h[6] = -0.150775
A[7] := |d2f(X[6])| = 0.904649
h[7] := sqrt(16*Δf_max/A[7]) = 0.288806
X[7] := X[6] + h[7] = 0.138032
A[8] := |d2f(X[7])| = 0.101551
h[8] := sqrt(16*Δf_max/A[8]) = 0.861994
X[8] := X[7] + h[8] = 1.00003
A[9] := |d2f(X[8])| = 0.0624992
# 9. Здійснити розрахунок абсцис x_i(1, n), починаючи з x_0, початкових ординат y_i^p(0,n), вузлів апроксимації(вершин ломаної лінії), що належать функції y=f(x), та кінцевих ординат y_i^k(0,n), вузлів апроксимації з урахуванням корекції, яку здійснюють для отримання знакозмінної похибки апроксимації.
# Виходячи з 8-го завдання, шукаємо ординати вершин ломаної лінії:
j := 0 .. 8
Yp[j] := f(X[j])
Yk[j] := Yp[j] - Δf_max
X = [-1; -0.887857; -0.768843; -0.640948; -0.500873; -0.342418; -0.150775; 0.138032; 1.00003]
Yp = [-4.09861; -3.7985; -3.55309; -3.36192; -3.22427; -3.13876; -3.10204; -3.1436; -3.3863]
Yk = [-4.10333; -3.80322; -3.55781; -3.36664; -3.22898; -3.14348; -3.10676; -3.14831; -3.39102]
# 10. Побудувати графік апроксимуючої функції (ломаної лінії) y=φ(x), використовуючи отримані значення x_i(1, n) та y_i^k(0,n).
x_max := x_max + 0.01
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# 11. Здійснити розрахунок значень кутових коефіцієнтів (значень тангенсів кутів нахилу), k_i(i=1,n) лінійних частин ломаної лінії.
# Знаходимо кутові коефіцієнти шляхом ділення різниці ординат на різницю абсцис:
i := 0 .. 7
k[i] := (Yk[i] - Yk[i + 1])/(X[i] - X[i + 1])
k[i] = [2.67615; 2.06203; 1.49472; 0.982722; 0.539632; 0.191611; -0.143888; -0.281562]
# 12. Виконати розкладання апроксимуючої функції (ломаної лінії) y=φ(x) на окремі доданки (лінійні та елементарні нелінійні {лінійні з обмеженням на нульовому рівні)}, починаючи з точки, яка має абсцису x_0^a. Значення x_0^a узяти з таблиці варіантів.
# 13. Над кожним елементарним нелінійним доданком зазначити його квадрант (І, ІІ, ІІІ, IV) та режим {на відкривання (на В) чи на закривання (на З)}
x_a[0] := X[4]
y_e0(x) := Yk[4]
y(x) := y_e0(x)
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b[4] := k[4]
y_e1(x) := b[4]*(x - X[4])
y(x) := y(x) + y_e1(x)
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b[5] := k[5] - k[4]
y_e2(x) :=
    b[5]*(x - X[5]) if b[5]*(x - X[5]) ≥ 0
    0 if b[5]*(x - X[5]) ≤ 0
y(x) := y(x) + y_e2(x)
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# І квадрант, на закривання
b[6] := k[6] - k[5]
y_e3(x) :=
    b[6]*(x - X[6]) if b[6]*(x - X[6]) ≥ 0
    0 if b[6]*(x - X[6]) ≤ 0
y(x) := y(x) + y_e3(x)
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# І квадрант, на відкривання
b[7] := k[7] - k[6]
# 5 )
y_e4(x) :=
    b[7]*(x - X[7]) if b[7]*(x - X[7]) ≥ 0
    0 if b[7]*(x - X[7]) ≤ 0
y(x) := y(x) + y_e4(x)
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# І квадрант, на відкривання
b[3] := k[3] - k[4]
y_e5(x) :=
    b[3]*(x - X[4]) if b[3]*(x - X[4]) ≥ 0
    0 if b[3]*(x - X[4]) ≤ 0
y(x) := y(x) + y_e5(x)
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# ІІ квадрант, на відкривання
b[2] := k[2] - k[3]
y_e6(x) :=
    b[2]*(x - X[3]) if b[2]*(x - X[3]) ≥ 0
    0 if b[2]*(x - X[3]) ≤ 0
y(x) := y(x) + y_e6(x)
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# ІІ квадрант, на відкривання
b[1] := k[1] - k[2]
y_e7(x) :=
    b[1]*(x - X[2]) if b[1]*(x - X[2]) ≥ 0
    0 if b[1]*(x - X[2]) ≤ 0
y(x) := y(x) + y_e7(x)
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# ІІ квадрант, на відкривання
b[0] := k[0] - k[1]
y_e8(x) :=
    b[0]*(x - X[1]) if b[0]*(x - X[1]) ≥ 0
    0 if b[0]*(x - X[1]) ≤ 0
φ(x) := y(x) + y_e8(x)
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# ІІ квадрант, на відкривання
# 14. Здійснити розрахунок наступних значень:
# - значення φ(x_0^a) для першого лінійного доданку
# - значення b_0=k_0 та x_0 для другого лінійного доданку
# - значення b_i=k_i-k_(i-1) та X_REFi для кожного елементарного нелінійного доданку
# 1) значення φ(x_0^a) для першого лінійного доданку:
φ(x_a[0]) = -2.50703
k1 := 0 .. 3
# 2) значення b_0=k_0 та х_0 для другого лінійного доданку:
k2 := 5 .. 7
b[4] = 0.539632
k[4] = 0.539632
X[4] = -0.500873
i := 0 .. 7
# 3) значення b_i=k_i-k_(i-1) та X_REFi для кожного елементарного нелінійного доданку:
j := 0 .. 8
Xref[j] := X[j]
b[k1] = [0.614115; 0.56731; 0.512; 0.44309]
b[k2] = [-0.348021; -0.335499; -0.137674]
Xref[j] = [-1; -0.887857; -0.768843; -0.640948; -0.500873; -0.342418; -0.150775; 0.138032; 1.00003]
