# Міністерство освіти і науки України
# Національний технічний університет України
# "Київський політехнічний інститут ім. Ігоря Сікорського"
# Розрахункова графічна робота
# "Виконання кусочно-лінійної апроксимації"
# Варіант №99
Виконав
# студент групи ІО-91
# Діденко Владислав
# Київ - 2021
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# 1. Побудувати графік функції y=f(x) для діапазону зміни аргументу x_min<=x<=x_max. Значення y=f(x), x_min та x_max узяти з таблиці варіантів.
x_max := 1
f(x) :=
    -|2 - x^3| - ln(3) if x ≤ 0
    -ln(x + 3) - 2 if x ≥ 0
x_min := -1
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# 2. Визначити другу похідну функції | d^2*y/dx^2 | та побудувати її графік для діапазону зміни аргументу
# x_min<=x<=x_max.
d2f(x) :=
    d^2/dx^2(f(x)) if x ≤ 0
    d^2/dx^2(f(x)) if x ≥ 0
d^2/dx^2(-|2 - x^3| - ln(3)) → 6*x*signum(2 - x^3, 0) - 18*x^4*Δ(2 - x^3)
d^2/dx^2(-ln(x + 3) - 2) → 1/(x + 3)^2
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# 3. Побудувати графік модулю другої похідної функції | |d^2*y/dx^2| | для діапазону зміни аргументу
# x_min<=x<=x_max.
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xa := 1
x0 := 1
# 4. Проаналізувати графік нелініної залежності функції y=f(x), з'ясувавши характер опуклості та вгнутості функції по частинам, наявність точок перегинання та наявність точок розриву першого роду другої похідної функції.
Given
# 4.1 Точки перегину
d2f(xa) == 0
x0 := Find(xa)
x0 = 4.22182e16  # - точка перегину.
# 4.2 Опуклість та вгнутість
# Функція f(x) опукла на інтервалі (x_min ; 0)
# Функція f(x) вгнута на інтервалі (0 ; x_max)
# 4.3 Точки розриву першого роду другої похідної функції
# Функція має одну точку розриву першого роду: x = 0
limit(d^2/dx^2(-|2 - x^3| - ln(3)), x → 0-) → 0
limit(d^2/dx^2(-ln(x + 3) - 2), x → 0+) → 1/9
# 5. Обрати початкову точку(або початкові точки) апроксимації для подальших розрахунків,
# зазначивши її (або їх) на графіках y == f(x) та |d^2*y/dx^2| , визначивши абсцису цієї початкової точки
# x_0^1 | (або абсциси початкових точок x_0^1,x_0^2 тощо).
x_01 := x_min
x_02 := 0
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# 6. По графіку |d^2*y/dx^2| обрати напрямок (або напрямки) розрахунків значень h[i] == x[i] - x[i - 1] (i=1,n) від початкової точки(або від початкових точок) та зазначити його(або їх) на цьому графіку у вигляді стрілок над графіком |d^2*y/dx^2|.
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# 7. Визначити методику розрахунку значень h_i (i=1,n) та обрати формулу для розрахунку значень: h[i] == sqrt(8*Δf_max/A[i]) або h[i] == sqrt(16*Δf_max/A[i]), де A[i] - максимальне по модулю значення другої похідної на і-й частині ломаної лінії, що розраховується.
# Для розрахунку h_i (i=1,n) обираємо формулу sqrt(8*Δf_max/A[i]) для точок, що лежать біля
# точки перегину, та sqrt(16*Δf_max/A[i]) для інших
# 8. Підібрати таке значення похибки Δf_max, при якому в результаті розрахунків h_i (i=1,n) отримаємо n=8 або n=9, тобто отримаємо апроксимуючу ломану лінію з 8 або з 9 частин. Виконати розрахунок усіх значень h_i (i=1,n) та здійснити нумерацію вузлів (вершин ломаної лінії), починаючи з номера 0.
Δf_max := 0.0049685
X[0] := x_min = -1
A[1] := |d2f(X[0])| = 6
h[1] := sqrt(16*Δf_max/A[1]) = 0.115106
X[1] := X[0] + h[1] = -0.884894
A[2] := |d2f(X[1])| = 5.30937
h[2] := sqrt(16*Δf_max/A[2]) = 0.122363
X[2] := X[1] + h[2] = -0.762531
A[3] := |d2f(X[2])| = 4.57519
h[3] := sqrt(16*Δf_max/A[3]) = 0.131816
X[3] := X[2] + h[3] = -0.630715
A[4] := |d2f(X[3])| = 3.78429
h[4] := sqrt(16*Δf_max/A[4]) = 0.144937
X[4] := X[3] + h[4] = -0.485777
A[5] := |d2f(X[4])| = 2.91466
h[5] := sqrt(16*Δf_max/A[5]) = 0.16515
X[5] := X[4] + h[5] = -0.320628
A[6] := |d2f(X[5])| = 1.92377
h[6] := sqrt(16*Δf_max/A[6]) = 0.203281
X[6] := X[5] + h[6] = -0.117347
A[7] := |d2f(X[6])| = 0.70408
h[7] := sqrt(8*Δf_max/A[7]) = 0.2376
X[7] := X[6] + h[7] = 0.120253
A[8] := |d2f(X[7])| = 0.102712
# Оскільки вийшли за межі, то
X[7] := 0
X[8] := x_max
A[9] := |d2f(X[8])| = 0.0625
h[8] := sqrt(16*Δf_max/A[9]) = 1.1278
X[7] := X[8] - h[8] = -0.127801
# Оскільки вийшли за межі, то
X[7] := 0
# 9. Здійснити розрахунок абсцис x_i(1, n), починаючи з x_0, початкових ординат y_i^p(0,n), вузлів апроксимації(вершин ломаної лінії), що належать функції y=f(x), та кінцевих ординат y_i^k(0,n), вузлів апроксимації з урахуванням корекції, яку здійснюють для отримання знакозмінної похибки апроксимації.
# Виходячи з 8-го завдання, шукаємо ординати вершин ломаної лінії:
j := 0 .. 8
Yp[j] := f(X[j])
Yk[j] := Yp[j] - Δf_max
X = [-1; -0.884894; -0.762531; -0.630715; -0.485777; -0.320628; -0.117347; 0; 1]
Yp = [-4.09861; -3.79152; -3.54199; -3.34951; -3.21325; -3.13157; -3.10023; -3.09861; -3.38629]
Yk = [-4.10358; -3.79649; -3.54696; -3.35448; -3.21821; -3.13654; -3.1052; -3.10358; -3.39126]
# 10. Побудувати графік апроксимуючої функції (ломаної лінії) y=φ(x), використовуючи отримані
# значення x_i(1, n) та y_i^k(0,n).
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# 11. Здійснити розрахунок значень кутових коефіцієнтів (значень тангенсів кутів нахилу), k_i(i=1,n) лінійних частин ломаної лінії.
# Знаходимо кутові коефіцієнти шляхом ділення різниці ординат на різницю абсцис:
i := 0 .. 7
k[i] := (Yk[i] - Yk[i + 1])/(X[i] - X[i + 1])
k[i] = [2.66793; 2.03925; 1.46019; 0.940168; 0.494535; 0.154197; 0.0137702; -0.287682]
# 12. Виконати розкладання апроксимуючої функції (ломаної лінії) y=φ(x) на окремі доданки (лінійні та елементарні нелінійні {лінійні з обмеженням на нульовому рівні)}, починаючи з точки, яка має абсцису x_0^a. Значення x_0^a узяти з таблиці варіантів.
# 13. Над кожним елементарним нелінійним доданком зазначити його квадрант (І, ІІ, ІІІ, IV) та режим {на відкривання (на В) чи на закривання (на З)}
x_min = -1
X[0] = -1
x_a[0] := X[0]
y_e0(x) := Yk[0]
y(x) := y_e0(x)
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b[0] := k[0] = 2.66793
y_e1(x) := b[0]*(x - X[0])
y(x) := y(x) + y_e1(x)
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b[1] := k[1] - k[0] = -0.628682
y_e2(x) :=
    b[1]*(x - X[1]) if x - X[1] ≥ 0
    0 otherwise
y(x) := y(x) + y_e2(x)
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# ІV квадрант, на закривання
b[2] := k[2] - k[1]
y_e3(x) :=
    b[2]*(x - X[2]) if x - X[2] ≥ 0
    0 otherwise
y(x) := y(x) + y_e3(x)
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# ІV квадрант, на закривання
b[3] := k[3] - k[2]
y_e4(x) :=
    b[3]*(x - X[3]) if x - X[3] ≥ 0
    0 otherwise
y(x) := y(x) + y_e4(x)
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# ІV квадрант, на закривання
b[4] := k[4] - k[3]
y_e5(x) :=
    b[4]*(x - X[4]) if x - X[4] ≥ 0
    0 otherwise
y(x) := y(x) + y_e5(x)
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# ІV квадрант, на закривання
b[5] := k[5] - k[4]
y_e6(x) :=
    b[5]*(x - X[5]) if x - X[5] ≥ 0
    0 otherwise
y(x) := y(x) + y_e6(x)
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# ІV квадрант, на закривання
b[6] := k[6] - k[5]
y_e7(x) :=
    b[6]*(x - X[6]) if x - X[6] ≥ 0
    0 otherwise
y(x) := y(x) + y_e7(x)
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# ІV квадрант, на закривання
b[7] := k[7] - k[6]
y_e8(x) :=
    b[7]*(x - X[7]) if x - X[7] ≥ 0
    0 otherwise
φ(x) := y(x) + y_e8(x)
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# ІV квадрант, на відкриття
# 14. Здійснити розрахунок наступних значень:
# - значення φ(x_0^a) для першого лінійного доданку
# - значення b_0=k_0 та x_0 для другого лінійного доданку
# - значення b_i=k_i-k_(i-1) та X_REFi для кожного елементарного нелінійного доданку
# 1) значення φ(x_0^a) для першого лінійного доданку:
φ(x_a[0]) = -4.10358
# 2) значення b_0=k_0 та х_0 для другого лінійного доданку:
b[0] = 2.66793
k[0] = 2.66793
X[0] = -1
# 3) значення b_i=k_i-k_(i-1) та X_REFi для кожного елементарного нелінійного доданку:
k1 := 1 .. 7
Xref[k1] := X[k1]
b[k1] = [-0.628682; -0.579056; -0.520026; -0.445633; -0.340339; -0.140427; -0.301452]
Xref[k1] = [-0.884894; -0.762531; -0.630715; -0.485777; -0.320628; -0.117347; 0]
